bbdfg
mkZ(y, t0, tk, N, D) :=
    Z0 ← rkfixed(y, t0, tk, N, D)
    n ← rows(Z0) - 1
    for i ∈ 0 .. n
        cy[0] ← Z0[:, 1][i]
        cy_[i] ← D(Z0[:, 0][i], cy)
    return augment(Z0, cy_)
y[0] := 4
N := 100
T_e1 := 2
t0_e1 := 0
tt_e1 := t0_e1 + 10
D_e1(x, y) := -1/T_e1*y[0]
DZ2 := mkZ(y, t0_e1, tt_e1, N, D_e1)
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DZ2 = [
    0, 4, -2;
    0.1, 3.80492, -1.90246;
    0.2, 3.61935, -1.80967;
    0.3, 3.44283, -1.72142;
    0.4, 3.27492, -1.63746;
    0.5, 3.1152, -1.5576;
    0.6, 2.96327, -1.48164;
    0.7, 2.81875, -1.40938;
    0.8, 2.68128, -1.34064;
    0.9, 2.55051, -1.27526
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]
